VFX := READPRN("circuit_lab2 Peak_X(V(3),1,1) vs VVAR.ANO")
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VFX = [
    1, 326125;
    4, 361229;
    7, 377331;
    10, 387532;
    13, 394833;
    16, 400533;
    19, 405134;
    22, 409034;
    25, 412335;
    28, 415235;
    30, 416935
]
Fr := VFX[:, 1]
Vvar := (-VFX)[:, 0]
Lk := 10^-3
Ck := 10^-10
pi := 3.14
Cd := -(Ck*Lk - (1/(4*Fr^2*pi^2)))/Lk
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Fr = [326125; 361229; 377331; 387532; 394833; 400533; 405134; 409034; 412335; 415235; 416935]
Cd = [1.38403e-10; 9.43191e-11; 7.80886e-11; 6.88362e-11; 6.26501e-11; 5.80532e-11; 5.4484e-11; 5.15518e-11; 4.91355e-11; 4.70594e-11; 4.58625e-11]
M := 0.5
CJO := 10^-12
VJO := 0.6
Given
9.432*10^-11 == CJO*(1 - (-4/VJO))^(-M)
7.809*10^-11 == CJO*(1 - (-7/VJO))^(-M)
6.265*10^-11 == CJO*(1 - (-13/VJO))^(-M)
Diod_P := Find(CJO, M, VJO)
CJO := Diod_P[0]
CJO = 1.95837e-10
Diod_P = [1.95837e-10; 0.382106; 0.693636]
M := Diod_P[1]
M = 0.382106
VJO := Diod_P[2]
VJO = 0.693636
Cd1 := CJO*(1 - (-VFX)[:, 0]/VJO)^(-M)
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