VAX := READPRN("lab_3_experiment_3.dlm")
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VAX =  # no stored result
Id3 := max(VAX[:, 1])
Id3 = 0.00669742
nMax := match(Id3, VAX[:, 1])
nMax = [
    22; 23; 24; 25; 54; 55; 56; 57; 86; 87
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]
Ud1 := 0.21
Id1 := 8.676*10^-4
Ud2 := 0.319
Id2 := 6.684*10^-3
Ud3 := 0.259
Id3 := 2.168*10^-3
Ud4 := 0.285
Id4 := 3.517*10^-3
Rb := 1
IS := (3*10)^-10
Ft := 0.020
m := 0.4371
Given
Id1*Rb + ln((IS + Id1)/IS)*m*Ft == Ud1
Id2*Rb + ln((IS + Id2)/IS)*m*Ft == Ud2
Id3*Rb + ln((IS + Id3)/IS)*m*Ft == Ud3
Id4*Rb + ln((IS + Id4)/IS)*m*Ft == Ud4
Diod_P := Minerr(IS, Rb, m, Ft)
Diod_P = [5.29052e-10; 12.5863; 0.453847; 0.0324404]
Rb1 := 1
NFt1 := 0.08
Is01 := 592.9*10^-12
Uformula(Idiod) := Idiod*Rb1 + NFt1*ln((Idiod + Is01)/Is01)
Idiod := VAX[:, 1]
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